WB := 0.38 = 0.38
TW := 0.32 = 0.32
WR := 0.075
wanted_wheel_vel := [1; 0; 0; 1]
wanted_robot_vel := [1; 0; 0]
inverse_kinematics := [1, 1, 1, 1; -1, 1, 1, -1; -2/(WB + TW), 2/(WB + TW), -2/(WB + TW), 2/(WB + TW)]
forward_kinematics := [1, -1, -(WB + TW)/2; 1, 1, (WB + TW)/2; 1, 1, -(WB + TW)/2; 1, -1, (WB + TW)/2]
needed_wheel_vel := forward_kinematics*wanted_robot_vel/WR → [13.3333333333; 13.3333333333; 13.3333333333; 13.3333333333]
resulting_robot_vel := inverse_kinematics*needed_wheel_vel*WR/4 → [1; 0.0; 0.0]
r := TW/2 = 0.16
w_r := 1
v := w_r*r = 0.16
w := v/WR = 2.13333
w2 := 2*v/TW = 1
